// COMSOL Multiphysics 5.4.0.225 model "eddycurrent 2.mph"
// Outline of the model tree

Geometry
  geom1 "几何 1" (2D axisymmetric, length unit m)
    sq1: Square "正方形 1" | pos = {0, -0.05}; size = 0.1
    r1: Rectangle "矩形 1"
      pos = {0, -0.021}
      layername = 层 1
      layer = 0.015
      layerleft = on
      layerbottom = off
      size = {0.08, 0.02}
    c1: Circle "圆 1" | pos = {0.0125, 0.0025}; r = 0.0025
    c2: Circle "圆 2" | pos = {0.0185, 0.0025}; r = 0.0025
    c3: Circle "圆 3" | pos = {0.0245, 0.0025}; r = 0.0025
    c4: Circle "圆 4" | pos = {0.0305, 0.0025}; r = 0.0025
    c5: Circle "圆 5" | pos = {0.0365, 0.0025}; r = 0.0025
    c6: Circle "圆 6" | pos = {0.0425, 0.0025}; r = 0.0025
    fin: Finalize "形成联合体"

Materials
  mat1: Common "Air" on domains 1
    def "Basic"
      thermalexpansioncoefficient = alpha_p(pA,T)
      molarmass = 0.02897
      bulkviscosity = muB(T)
      relpermeability = 1
      relpermittivity = 1
      dynamicviscosity = eta(T)
      ratioofspecificheat = 1.4
      electricconductivity = 0[S/m]
      heatcapacity = Cp(T)
      density = rho(pA,T)
      thermalconductivity = k(T)
      soundspeed = cs(T)
      eta: Piecewise | arg = T; pieces = {200.0, 1600.0, -8.38278E-7+8.35717342E-8*T^1-7.69429583E-11*T^2+4.6437266E-14*T^3-1.06585607E-17*T^4}; argunit = K; fununit = Pa*s
      Cp: Piecewise | arg = T; pieces = {200.0, 1600.0, 1047.63657-0.372589265*T^1+9.45304214E-4*T^2-6.02409443E-7*T^3+1.2858961E-10*T^4}; argunit = K; fununit = J/(kg*K)
      rho: Analytic | expr = pA*0.02897/R_const[K*mol/J]/T; args = {pA, T}; dermethod = manual; argders = {{pA, d(pA*0.02897/R_const/T,pA)}, {T, d(pA*0.02897/R_const/T,T)}}; argunit = Pa,K; fununit = kg/m^3
      k: Piecewise | arg = T; pieces = {200.0, 1600.0, -0.00227583562+1.15480022E-4*T^1-7.90252856E-8*T^2+4.11702505E-11*T^3-7.43864331E-15*T^4}; argunit = K; fununit = W/(m*K)
      cs: Analytic | expr = sqrt(1.4*R_const[K*mol/J]/0.02897*T); args = T; dermethod = manual; argunit = K; fununit = m/s
      an1: Analytic | funcname = alpha_p; expr = -1/rho(pA,T)*d(rho(pA,T),T); args = {pA, T}; argunit = Pa,K; fununit = 1/K
      an2: Analytic "Analytic 2a" | funcname = muB; expr = 0.6*eta(T); args = T; argunit = K; fununit = Pa*s
    RefractiveIndex
      n = 1
      ki = 0
    NonlinearModel
      BA = (def.gamma+1)/2
  mat2: Common "Copper" on domains 2-9
    def "Basic"
      relpermeability = 1
      electricconductivity = 5.998e7[S/m]
      thermalexpansioncoefficient = 17e-6[1/K]
      heatcapacity = 385[J/(kg*K)]
      relpermittivity = 1
      density = 8960[kg/m^3]
      thermalconductivity = 400[W/(m*K)]
    Enu "Young's modulus and Poisson's ratio"
      youngsmodulus = 110e9[Pa]
      poissonsratio = 0.35
    linzRes "Linearized resistivity"
      rho0 = 1.72e-8[ohm*m]
      alpha = 0.0039[1/K]
      Tref = 298[K]

Physics
  mf: InductionCurrents "磁场" on all domains
    dependent variable A = {Ar, Aphi, Az}
    al1: AmperesLaw "安培定律 1" (default)
    axi1: AxialSymmetry "轴对称 1" (default)
    mi1: MagneticInsulation "磁绝缘 1" (default)
    init1: init "初始值 1" (default)
    coil1: Coil "线圈 1" on domains 4-6 | CoilExcitation = Voltage; VCoil = 0.1[mV]
    fcal1: ForceCalculation "力计算 1" on domains 2, 3 | ForceName = plate

Mesh
  mesh1 "网格 1" (physics-controlled)

Studies
  std1 "研究 1"
    freq: Frequency "频域" | plist = range(10,50,310)

Solver configurations
  sol1 "解 1" (study std1)
    v1: Variables "因变量 1"
    s1: Stationary "稳态求解器 1"
      dDef: Direct "直接"
      p1: Parametric "参数化 1" | pname = freq; plistarr = range(10,50,310); punit = Hz; pcontinuationmode = no
      fc1: FullyCoupled "全耦合 1" | linsolver = dDef

Datasets
  dset1: Solution on domains 2, 3 | solution = sol1
  rev1: Revolve2D "二维旋转 1" | data = dset1; startangle = -90; revangle = 225

Plots
  pg1: PlotGroup2D "磁通密度模 (mf)" | data = dset1
    surf1: Surface "表面 1" | expr = mf.normJ; descr = 电流密度模
    con1: Contour "等值线 1" | expr = mf.Aphi*r
  pg2: PlotGroup3D "磁通密度模，回转几何 (mf)" | data = rev1
    surf1: Surface "表面 1" | expr = mf.normB
    con1: Contour "等值线 1" | expr = mf.Aphi*r
  pg3: PlotGroup1D "一维绘图组 3" | data = dset1
    lngr1: LineGraph "线图 1" on boundaries 6, 10 | expr = mf.normJ; descr = 电流密度模; xdataexpr = r
  pg4: PlotGroup1D "一维绘图组 4" | data = dset1
    lngr1: LineGraph "线图 1" on boundaries 8 | expr = mf.normJ; descr = 电流密度模; xdataexpr = z

Exports
  img1: Image1D "电流密度随频率和r坐标的关系"
    size = current
    weblockratio = off
    webwidth = 800
    webheight = 600
    webresolution = 96
    printlockratio = off
    printwidth = 120
    printheight = 90
    printresolution = 300
    pngfilename = C:\Users\YQJ\Desktop\电流密度随频率和r坐标的关系.png
    options = on
    axes = on
  img2: Image1D "电流密度模随深度的关系"
    size = current
    weblockratio = off
    webwidth = 800
    webheight = 600
    webresolution = 96
    printlockratio = off
    printwidth = 120
    printheight = 90
    printresolution = 300
    pngfilename = C:\Users\YQJ\Desktop\电流密度模随深度的关系.png
    options = on
    axes = on
  img3: Image2D "图像 3"
    size = current
    weblockratio = off
    webwidth = 800
    webheight = 600
    webresolution = 96
    printlockratio = off
    printwidth = 120
    printheight = 90
    printresolution = 300
    pngfilename = C:\Users\YQJ\Desktop\电流密度模整体.png
    options = off
    axes = on
  img4: Image3D "三维电流密度模"
    size = current
    weblockratio = off
    webwidth = 800
    webheight = 600
    webresolution = 96
    printlockratio = off
    printwidth = 120
    printheight = 90
    printresolution = 300
    pngfilename = C:\Users\YQJ\Desktop\三维度电流密度模.png
    options = off